<?xml version="1.0"?>
<?xml-stylesheet type="text/xsl" href="http://jsbsim.sourceforge.net/JSBSim.xsl"?>
<fdm_config name="C684" version="2.0" release="BETA"
   xmlns:xsi="http://www.w3.org/2001/XMLSchema-instance"
   xsi:noNamespaceSchemaLocation="http://jsbsim.sourceforge.net/JSBSim.xsd">

  <fileheader>
    <author> Guillaume Chauvat, Laurent Hayvel (texture) </author>
    <filecreationdate> 2008-08-27 </filecreationdate>
    <version> 0.4.11 </version>
    <description>Caudron C684</description>
  </fileheader>

  <metrics>
    <wingarea  unit="M2">   9.00 </wingarea>
    <wingspan  unit="M" >   7.70 </wingspan>
    <wing_incidence>        0.043</wing_incidence> <!-- radians -->
    <chord     unit="M" >   1.17 </chord> <!-- mean chord -->
    <htailarea unit="M2">   2.00 </htailarea>
    <htailarm  unit="M" >   3.80 </htailarm>
    <vtailarea unit="M2">   1.50 </vtailarea>
    <vtailarm  unit="M" >   4.00 </vtailarm>
    <location name="AERORP" unit="M">
      <x>   2.35 </x>
      <y>   0.00 </y>
      <z>  -0.45 </z>
    </location>
    <location name="EYEPOINT" unit="M">
      <x> 0.00 </x>
      <y> 0.00 </y>
      <z> 0.00 </z>
    </location>
    <location name="VRP" unit="M">
      <x> 3.00 </x>
      <y> 0.00 </y>
      <z> 0.00 </z>
    </location>
  </metrics>

  <mass_balance>
    <ixx unit="KG*M2">   2600 </ixx>
    <iyy unit="KG*M2">   2900 </iyy>
    <izz unit="KG*M2">   3800 </izz>
    <ixy unit="KG*M2">      0 </ixy>
    <ixz unit="KG*M2">      0 </ixz>
    <iyz unit="KG*M2">      0 </iyz>
    <emptywt unit="KG" >  640 </emptywt>
    <location name="CG" unit="M">
      <x>   2.35 </x>
      <y>   0.00 </y>
      <z>  -0.30 </z>
    </location>

    <pointmass name="pilot" >
      <weight unit="KG">85</weight>
      <location name="POINTMASS" unit = "M">
        <x>  3.50 </x>
        <y>  0.00 </y>
        <z> -0.10 </z>
      </location>
    </pointmass>

    <pointmass name="passenger" >
      <weight unit="KG">85</weight>
      <location name="POINTMASS" unit = "M">
        <x>  4.00 </x>
        <y>  0.00 </y>
        <z> -0.10 </z>
      </location>
    </pointmass>

  </mass_balance>

  <ground_reactions>

    <contact type="BOGEY" name="LEFT_MAIN">
      <location unit="M">
        <x>  2.11 </x>
        <y> -0.90 </y>
        <z> -1.35 </z>
      </location>
      <static_friction>  0.80 </static_friction>
      <dynamic_friction> 0.50 </dynamic_friction>
      <rolling_friction> 0.02 </rolling_friction>
      <spring_coeff unit="N/M">      120000.00 </spring_coeff>
      <damping_coeff unit="N/M/SEC">  40000.00 </damping_coeff>
      <max_steer unit="DEG">0</max_steer>
      <brake_group>LEFT</brake_group>
      <retractable>FIXED</retractable>
    </contact>

    <contact type="BOGEY" name="RIGHT_MAIN">
      <location unit="M">
        <x>  2.11 </x>
        <y>  0.90 </y>
        <z> -1.35 </z>
      </location>
      <static_friction>  0.80 </static_friction>
      <dynamic_friction> 0.50 </dynamic_friction>
      <rolling_friction> 0.02 </rolling_friction>
      <spring_coeff unit="N/M">      120000.00 </spring_coeff>
      <damping_coeff unit="N/M/SEC">  40000.00 </damping_coeff>
      <max_steer unit="DEG">0</max_steer>
      <brake_group>RIGHT</brake_group>
      <retractable>FIXED</retractable>
    </contact>

    <contact type="BOGEY" name="TAIL">
      <location unit="M">
        <x>  6.59 </x>
        <y>  0.00 </y>
        <z> -0.49 </z>
      </location>
      <static_friction>  0.60 </static_friction>
      <dynamic_friction> 0.10 </dynamic_friction>
      <rolling_friction> 0.10 </rolling_friction>
      <spring_coeff unit="N/M">      200000.00 </spring_coeff>
      <damping_coeff unit="N/M/SEC">   6000.00 </damping_coeff>
      <max_steer unit="DEG"> 0.00 </max_steer>
      <brake_group>NONE</brake_group>
      <retractable>FIXED</retractable>
    </contact>

    <contact type="BOGEY" name="DERIVE">
      <location unit="M">
        <x>  6.40 </x>
        <y>  0.00 </y>
        <z>  1.20 </z>
      </location>
      <static_friction>  0.90 </static_friction>
      <dynamic_friction> 0.80 </dynamic_friction>
      <rolling_friction> 0.80 </rolling_friction>
      <spring_coeff unit="N/M">      300000.00 </spring_coeff>
      <damping_coeff unit="N/M/SEC">  10000.00 </damping_coeff>
      <max_steer unit="DEG"> 0.00 </max_steer>
      <brake_group>NONE</brake_group>
      <retractable>FIXED</retractable>
    </contact>
<!--
    <contact type="BOGEY" name="LEFT_TIP">
      <location unit="M">
        <x>  2.35 </x>
        <y> -3.85 </y>
        <z> -0.29 </z>
      </location>
      <static_friction>  0.80 </static_friction>
      <dynamic_friction> 0.80 </dynamic_friction>
      <rolling_friction> 0.80 </rolling_friction>
      <spring_coeff unit="N/M">      300000.00 </spring_coeff>
      <damping_coeff unit="N/M/SEC">  10000.00 </damping_coeff>
      <max_steer unit="DEG"> 0.00 </max_steer>
      <brake_group>NONE</brake_group>
      <retractable>FIXED</retractable>
    </contact>

    <contact type="BOGEY" name="RIGHT_TIP">
      <location unit="M">
        <x>  2.35 </x>
        <y>  3.85 </y>
        <z> -0.29 </z>
      </location>
      <static_friction>  0.80 </static_friction>
      <dynamic_friction> 0.50 </dynamic_friction>
      <rolling_friction> 0.50 </rolling_friction>
      <spring_coeff unit="N/M">      300000.00 </spring_coeff>
      <damping_coeff unit="N/M/SEC">  10000.00 </damping_coeff>
      <max_steer unit="DEG"> 0.00 </max_steer>
      <brake_group>NONE</brake_group>
      <retractable>FIXED</retractable>
    </contact>
-->

    <contact type="STRUCTURE" name="LEFT_WING">
      <location unit="M">
        <x>  2.35 </x>
        <y> -3.85 </y>
        <z> -0.29 </z>
      </location>
      <static_friction>  0.80 </static_friction>
      <dynamic_friction> 0.80 </dynamic_friction>
      <spring_coeff unit="N/M">      300000.00 </spring_coeff>
      <damping_coeff unit="N/M/SEC">  10000.00 </damping_coeff>
    </contact>

    <contact type="STRUCTURE" name="RIGHT_WING">
      <location unit="M">
        <x>  2.35 </x>
        <y>  3.85 </y>
        <z> -0.29 </z>
      </location>
      <static_friction>  0.80 </static_friction>
      <dynamic_friction> 0.80 </dynamic_friction>
      <spring_coeff unit="N/M">      300000.00 </spring_coeff>
      <damping_coeff unit="N/M/SEC">  10000.00 </damping_coeff>
    </contact>

    <contact type="STRUCTURE" name="NOSE1">
      <location unit="M">
        <x>  1.00 </x>
        <y>  0.00 </y>
        <z>  0.30 </z>
      </location>
      <static_friction>  0.80 </static_friction>
      <dynamic_friction> 0.80 </dynamic_friction>
      <spring_coeff unit="N/M">      300000.00 </spring_coeff>
      <damping_coeff unit="N/M/SEC">  10000.00 </damping_coeff>
    </contact>

    <contact type="STRUCTURE" name="NOSE2">
      <location unit="M">
        <x>  0.00 </x>
        <y>  0.00 </y>
        <z>  0.00 </z>
      </location>
      <static_friction>  0.80 </static_friction>
      <dynamic_friction> 0.80 </dynamic_friction>
      <spring_coeff unit="N/M">      300000.00 </spring_coeff>
      <damping_coeff unit="N/M/SEC">  10000.00 </damping_coeff>
    </contact>

    <contact type="STRUCTURE" name="NOSE3">
      <location unit="M">
        <x>  0.57 </x>
        <y>  0.00 </y>
        <z> -0.65 </z>
      </location>
      <static_friction>  0.80 </static_friction>
      <dynamic_friction> 0.80 </dynamic_friction>
      <spring_coeff unit="N/M">      300000.00 </spring_coeff>
      <damping_coeff unit="N/M/SEC">  10000.00 </damping_coeff>
    </contact>

  </ground_reactions>

  <propulsion>

    <engine file="6Pfi">
      <location unit="M">
        <x>   1.25 </x>
        <y>   0.00 </y>
        <z>  -0.25 </z>
      </location>
      <orient unit="DEG">
        <pitch> 0.00 </pitch>
        <roll>  0.00 </roll>
        <yaw>   0.00 </yaw>
      </orient>
      <feed>0</feed>
      <feed>1</feed>
      <thruster file="ratier_variable">
        <location unit="M">
          <x>   0.33 </x>
          <y>   0.00 </y>
          <z>   0.00 </z>
        </location>
        <orient unit="DEG">
          <pitch> 0.00 </pitch>
          <roll>  0.00 </roll>
          <yaw>   0.00 </yaw>
        </orient>
        <sense>-1</sense>
        <p_factor>10</p_factor>
      </thruster>
    </engine>

    <tank type="FUEL" number="0">
      <location unit="M">
        <x>  2.60 </x>
        <y> -0.80 </y>
        <z> -0.40 </z>
      </location>
      <capacity unit="KG"> 72.00 </capacity> <!-- 100 L -->
      <contents unit="KG"> 68.00 </contents>
      <density unit="KG/L"> 0.72 </density>
    </tank>

    <tank type="FUEL" number="1">
      <location unit="M">
        <x>  2.60 </x>
        <y>  0.80 </y>
        <z> -0.40 </z>
      </location>
      <capacity unit="KG"> 72.80 </capacity>
      <contents unit="KG"> 68.00 </contents>
      <density unit="KG/L"> 0.72 </density>
    </tank>

  </propulsion>

  <flight_control name="FCS: C684">

    <property>fcs/mixture-failure-cmd-norm</property>
	<property>propulsion/engine[0]/failure</property>
	<property>propulsion/engine[0]/throttle-factor-pos-norm</property>

    <channel name="Pitch">
      <summer name="Pitch Trim Sum">
        <input>fcs/elevator-cmd-norm</input>
        <input>fcs/pitch-trim-cmd-norm</input>
        <clipto>
          <min> -1 </min>
          <max>  1 </max>
        </clipto>
        <output>fcs/elevator-pos-norm</output>
      </summer>

      <aerosurface_scale name="Elevator Control">
        <input>fcs/pitch-trim-sum</input>
        <range>
          <min> -0.35 </min>
          <max>  0.30 </max>
        </range>
        <output>fcs/elevator-pos-rad</output>
      </aerosurface_scale>

    </channel>

    <channel name="Roll">
      <summer name="Roll Trim Sum">
        <input>fcs/aileron-cmd-norm</input>
        <input>fcs/roll-trim-cmd-norm</input>
        <clipto>
          <min> -1 </min>
          <max>  1 </max>
        </clipto>
      </summer>

      <aerosurface_scale name="Left Aileron Control">
        <input>fcs/roll-trim-sum</input>
        <gain>0.01745</gain>
        <range>
          <min> -20 </min>
          <max>  15 </max>
        </range>
        <output>fcs/left-aileron-pos-rad</output>
      </aerosurface_scale>
      <aerosurface_scale name="Left Aileron Control norm">
        <input>fcs/left-aileron-pos-deg</input>
        <domain>
          <min> -20 </min>
          <max>  15 </max>
        </domain>
        <range>
          <min> -1 </min>
          <max>  1 </max>
        </range>
        <output>fcs/left-aileron-pos-norm</output>
      </aerosurface_scale>

      <aerosurface_scale name="Right Aileron Control">
        <input>fcs/roll-trim-sum</input>
        <gain>-0.01745</gain>
        <range>
          <min> -20 </min>
          <max>  15 </max>
        </range>
        <output>fcs/right-aileron-pos-rad</output>
      </aerosurface_scale>
      <aerosurface_scale name="Right Aileron Control norm">
        <input>fcs/right-aileron-pos-deg</input>
        <domain>
          <min> -20 </min>
          <max>  15 </max>
        </domain>
        <range>
          <min>  1 </min>
          <max> -1 </max>
        </range>
        <output>fcs/right-aileron-pos-norm</output>
      </aerosurface_scale>

    </channel>

    <channel name="Yaw">
      <summer name="Rudder Command Sum">
        <input>fcs/rudder-cmd-norm</input>
        <input>fcs/yaw-trim-cmd-norm</input>
        <limit>
          <min> -20 </min>
          <max>  20 </max>
        </limit>
      </summer>

      <aerosurface_scale name="Rudder Control">
        <input>fcs/rudder-command-sum</input>
        <gain>0.01745</gain>
        <range>
          <min> -20 </min>
          <max>  20 </max>
        </range>
        <output>fcs/rudder-pos-rad</output>
      </aerosurface_scale>

      <aerosurface_scale name="Rudder Sum">
        <input>fcs/rudder-command-sum</input>
        <range>
          <min> -1 </min>
          <max>  1 </max>
        </range>
        <output>fcs/rudder-pos-norm</output>
      </aerosurface_scale>

    </channel>

    <channel name="Flaps">
      <kinematic name="Flaps Control">
        <input>fcs/flap-cmd-norm</input>
        <traverse>
          <setting>
            <position>0</position>
            <time>0</time>
          </setting>
          <setting>
            <position>25</position>
            <time>1.0</time>
          </setting>
          <setting>
            <position>65</position>
            <time>1.6</time>
          </setting>
        </traverse>
        <output>fcs/flap-pos-deg</output>
      </kinematic>
      <aerosurface_scale name="Flap Position Normalizer">
        <input>fcs/flap-pos-deg</input>
        <domain>
          <min>0</min>  <!-- Flaps actual minimum position -->
          <max>65</max>  <!-- Flaps actual maximum position -->
          </domain>
        <range>
          <min>0</min>  <!-- Flaps normalized minimum position -->
          <max>1</max>  <!-- Flaps normalized maximum position -->
        </range>
        <output>fcs/flap-pos-norm</output>
      </aerosurface_scale>
    </channel>

    <channel name="Landing Gear">
    </channel>

    <channel name="Speedbrake">
      <kinematic name="Speedbrake Control">
        <input>fcs/speedbrake-cmd-norm</input>
        <traverse>
          <setting>
            <position> 0 </position>
            <time>     0 </time>
          </setting>
          <setting>
            <position> 1 </position>
            <time>     1 </time>
          </setting>
        </traverse>
        <output>fcs/speedbrake-pos-norm</output>
      </kinematic>
    </channel>

    <channel name="Propeller0">
      <summer name="Propeller0 Pitch Cmd">
        <input>fcs/advance-cmd-norm</input>
        <clipto>
          <min> 19 </min>
          <max> 23 </max>
        </clipto>
        <output>fcs/propeller0-pitch-cmd</output>
      </summer>
    </channel>

    <channel name="Brakes">
      <scheduled_gain name="Left Brake Cmd Norm">
        <input>fcs/left-brake-cmd-norm</input>
        <table>
          <independentVar>fcs/rudder-pos-norm</independentVar>
          <tableData>
           -1	0
            0	1
            1	1
          </tableData>
        </table>
        <output>fcs/left-brake-cmd-norm</output>
      </scheduled_gain>
      <scheduled_gain name="Right Brake Cmd Norm">
        <input>fcs/right-brake-cmd-norm</input>
        <table>
          <independentVar>fcs/rudder-pos-norm</independentVar>
          <tableData>
           -1	1
            0	1
            1	0
          </tableData>
        </table>
        <output>fcs/right-brake-cmd-norm</output>
      </scheduled_gain>
    </channel>

    <channel name="Engine Failures">
      <switch name="Mixture Pos Norm">
        <default value="fcs/mixture-cmd-norm"/>
        <test value="fcs/mixture-failure-cmd-norm">
          propulsion/engine/failure == 1
        </test>
		<output>fcs/mixture-pos-norm</output>
      </switch>

	  <pure_gain name="Throttle Pos Norm">
        <input>fcs/throttle-cmd-norm</input>
        <gain>propulsion/engine/throttle-factor-pos-norm</gain>
        <output>fcs/throttle-pos-norm</output>
      </pure_gain>
    </channel>

  </flight_control>

  <aerodynamics>

  <function name="aero/function/kCDge">
    <description>Change_in_drag_due_to_ground_effect</description>
    <product>
      <table>
        <independentVar>aero/h_b-mac-ft</independentVar>
          <tableData>
                     0.0000 0.0480
                     0.1000 0.5150
                     0.1500 0.6290
                     0.2000 0.7090
                     0.3000 0.8150
                     0.4000 0.8820
                     0.5000 0.9280
                     0.6000 0.9620
                     0.7000 0.9880
                     0.8000 1.0000
                     0.9000 1.0000
                     1.0000 1.0000
                     1.1000 1.0000
          </tableData>
        </table>
      </product>
    </function>

  <function name="aero/function/kCLge">
    <description>Change_in_lift_due_to_ground_effect</description>
    <product>
      <table>
        <independentVar>aero/h_b-mac-ft</independentVar>
        <tableData>
          0.0000 1.2030
          0.1000 1.1270
          0.1500 1.0900
          0.2000 1.0730
          0.3000 1.0460
          0.4000 1.0550
          0.5000 1.0190
          0.6000 1.0130
          0.7000 1.0080
          0.8000 1.0060
          0.9000 1.0030
          1.0000 1.0020
          1.1000 1.0000
        </tableData>
      </table>
    </product>
  </function>

  <axis name="LIFT">

    <function name="aero/coefficient/CLalpha">
      <description>Lift_due_to_alpha</description>
      <product>
        <property>aero/qbar-psf</property>
        <property>metrics/Sw-sqft</property>
        <property>aero/function/kCLge</property>
        <table>
          <independentVar lookup="row">aero/alpha-wing-rad</independentVar>
          <tableData>
			-0.4363	-0.505
			-0.3491	-0.676
			-0.2967	-1.144
			-0.2792	-1.225
			-0.2269	-1.135
			-0.1745	-0.874
			-0.1396	-0.685
			-0.1047	-0.487
			-0.0698	-0.28
			-0.0349	-0.082
			-0.0175	0.017
			0.0000	0.125
			0.0349	0.332
			0.0698	0.53
			0.1047	0.737
			0.1396	0.935
			0.1745	1.124
			0.2269	1.385
			0.2792	1.466
			0.2967	1.277
			0.3491	0.926
			0.4363	0.755
          </tableData>
        </table>
      </product>
    </function>

    <function name="aero/coefficient/dCLflap">
      <description>Delta_Lift_due_to_flaps</description>
      <product>
        <property>aero/qbar-psf</property>
        <property>metrics/Sw-sqft</property>
        <table>
          <independentVar lookup="row">fcs/flap-pos-deg</independentVar>
          <tableData>
            0   0.00
            25  0.37
            65  0.58
          </tableData>
        </table>
      </product>
    </function>

    <function name="aero/coefficient/dCLsb">
        <description>Delta_Lift_due_to_speedbrake</description>
        <product>
            <property>aero/qbar-psf</property>
            <property>metrics/Sw-sqft</property>
            <property>fcs/speedbrake-pos-norm</property>
            <value>0</value>
        </product>
    </function>

    <function name="aero/coefficient/CLde">
        <description>Lift_due_to_Elevator_Deflection</description>
        <product>
            <property>aero/qbar-psf</property>
            <property>metrics/Sw-sqft</property>
            <property>fcs/elevator-pos-rad</property>
            <value>0.2</value>
        </product>
    </function>

</axis>


  <axis name="DRAG">

    <function name="aero/coefficient/CD0">
      <description>Drag_at_zero_lift</description>
      <product>
        <property>aero/qbar-psf</property>
        <property>metrics/Sw-sqft</property>
        <table>
          <independentVar lookup="row">aero/alpha-wing-rad</independentVar>
          <tableData>
			-1.5708	-1.500
			-0.4363	0.320
			-0.3491	0.150
			-0.2967	0.080
			-0.2618	0.057
			-0.2269	0.045
			-0.1745	0.036
			-0.1396	0.032
			-0.1047	0.028
			-0.0698	0.025
			-0.0349	0.024
			-0.0175	0.023
			0.0000	0.023
			0.0349	0.024
			0.0698	0.025
			0.1047	0.027
			0.1396	0.029
			0.1745	0.033
			0.2269	0.043
			0.2618	0.055
			0.2967	0.080
			0.3491	0.150
			0.4363	0.320
			1.5708	1.500
          </tableData>
        </table>
      </product>
    </function>

    <function name="aero/coefficient/CDi">
      <description>Induced_drag</description>
        <product>
          <property>aero/qbar-psf</property>
          <property>metrics/Sw-sqft</property>
          <property>aero/cl-squared</property>
          <value>0.049</value> <!-- 1/(pi * aspect ratio * e (oswald coefficient)) with aspect ratio = 6.58 and e = 0.99 -->
        </product>
    </function>

    <function name="aero/coefficient/CDmach">
      <description>Drag_due_to_mach</description>
      <product>
        <property>aero/qbar-psf</property>
        <property>metrics/Sw-sqft</property>
        <table>
          <independentVar lookup="row">velocities/mach</independentVar>
          <tableData>
              0.00      0.000
              0.72      0.000
              1.10      0.023
              1.80      0.015
          </tableData>
        </table>
      </product>
    </function>

    <function name="aero/coefficient/CDflap">
      <description>Drag_due_to_flaps</description>
      <product>
        <property>aero/qbar-psf</property>
        <property>metrics/Sw-sqft</property>
        <table>
          <independentVar lookup="row">fcs/flap-pos-deg</independentVar>
          <tableData>
            0   0.00
            25  0.02
            65  0.10
          </tableData>
        </table>
      </product>
    </function>

    <function name="aero/coefficient/CDsb">
      <description>Drag_due_to_speedbrakes</description>
      <product>
        <property>aero/qbar-psf</property>
        <property>metrics/Sw-sqft</property>
        <property>fcs/speedbrake-pos-norm</property>
        <value>0.00</value> <!-- no speedbrakes -->
      </product>
    </function>

    <function name="aero/coefficient/CDbeta">
      <description>Drag_due_to_sideslip</description>
      <product>
        <property>aero/qbar-psf</property>
        <property>metrics/Sw-sqft</property>
        <table>
          <independentVar lookup="row">aero/beta-rad</independentVar>
          <tableData>
            -1.57       1.230
            -0.26    0.050
             0.00       0.000
             0.26    0.050
             1.57       1.230
          </tableData>
        </table>
      </product>
    </function>

    <function name="aero/coefficient/CDde">
      <description>Drag_due_to_Elevator_Deflection</description>
      <product>
        <property>aero/qbar-psf</property>
        <property>metrics/Sw-sqft</property>
        <abs><property>fcs/elevator-pos-norm</property></abs>
        <value>0.04</value>
      </product>
    </function>

  </axis>

  <axis name="SIDE">

    <function name="aero/coefficient/CYb">
      <description>Side_force_due_to_beta</description>
      <product>
        <property>aero/qbar-psf</property>
        <property>metrics/Sw-sqft</property>
        <property>aero/beta-rad</property>
        <value>-1</value>
      </product>
    </function>

  </axis>

  <axis name="ROLL">

    <function name="aero/coefficient/Clb">
      <description>Roll_moment_due_to_beta</description>
      <product>
        <property>aero/qbar-psf</property>
        <property>metrics/Sw-sqft</property>
        <property>metrics/bw-ft</property>
        <property>aero/beta-rad</property>
        <table>
          <independentVar lookup="row">aero/alpha-deg</independentVar>
          <tableData>
             -40.0     -0.250
             -22.0     -0.200
             -16.0     -0.150
             -14.0     -0.110
               0.0     -0.080
              14.0     -0.110
              16.0     -0.150
              22.0     -0.200
              40.0     -0.250
          </tableData>
        </table>
      </product>
    </function>

    <function name="aero/coefficient/Clp">
      <description>Roll_moment_due_to_roll_rate</description>
      <product>
        <property>aero/qbar-psf</property>
        <property>metrics/Sw-sqft</property>
        <property>metrics/bw-ft</property>
        <property>aero/bi2vel</property>
        <property>velocities/p-aero-rad_sec</property>
        <table>
          <independentVar lookup="row">aero/alpha-deg</independentVar>
		  <independentVar lookup="column">velocities/p-aero-rad_sec</independentVar>
          <tableData>
					-10.0	0.0		10.0
             -40.0	-0.20  -0.10	-0.20  <!-- |                  -->
             -22.0	-0.10	0.30	-0.10  <!-- | Asymmetric stall -->
             -18.0	-0.05	0.20	-0.05  <!-- |                  -->
             -16.0	-0.40	-0.05	-0.40
             -14.0	-0.43	-0.35	-0.43
               0.0	-0.45	-0.45	-0.45
              14.0	-0.43	-0.35	-0.43
              16.0	-0.40	-0.05	-0.40
              18.0	-0.05	0.20	-0.05  <!-- |                  -->
              22.0	-0.10	0.30	-0.10  <!-- | Asymmetric stall -->
              40.0	-0.20  -0.10	-0.20  <!-- |                  -->
          </tableData>
        </table>
      </product>
    </function>

    <function name="aero/coefficient/Clr">
      <description>Roll_moment_due_to_yaw_rate</description>
      <product>
        <property>aero/qbar-psf</property>
        <property>metrics/Sw-sqft</property>
        <property>metrics/bw-ft</property>
        <property>aero/bi2vel</property>
        <property>velocities/r-aero-rad_sec</property>
        <value>0.20</value>
      </product>
    </function>

    <function name="aero/coefficient/Clda">
      <description>Roll_moment_due_to_aileron</description>
      <product>
        <property>aero/qbar-psf</property>
        <property>metrics/Sw-sqft</property>
        <property>metrics/bw-ft</property>
        <table>
          <independentVar lookup="row">fcs/left-aileron-pos-rad</independentVar>
          <tableData>
          	-0.349	-0.349
          	0		-0.011  <!-- avoid engine effects in cruise -->
          	0.26175	0.26175
          </tableData>
        </table>
        <table>
          <independentVar lookup="row">aero/alpha-deg</independentVar>
          <tableData>
             -40.0      0.00
             -18.0      0.00
             -15.0      0.09
             -13.0      0.11
               0.0      0.12
              13.0      0.11
              15.0      0.09
              18.0      0.00
              40.0      0.00
          </tableData>
        </table>
      </product>
    </function>

    <function name="aero/coefficient/Cldr">
      <description>Roll_moment_due_to_rudder</description>
      <product>
        <property>aero/qbar-psf</property>
        <property>metrics/Sw-sqft</property>
        <property>metrics/bw-ft</property>
        <property>fcs/rudder-pos-rad</property>
        <value>0.00</value>
      </product>
    </function>
  </axis>


  <axis name="PITCH">

    <function name="aero/coefficient/Cmo">
      <description>Pitching_moment_at_zero_alpha</description>
      <product>
        <property>aero/qbar-psf</property>
        <property>metrics/Sw-sqft</property>
        <property>metrics/cbarw-ft</property>
        <value>0.0</value>
      </product>
    </function>

    <function name="aero/coefficient/Cmalpha">
      <description>Pitch_moment_due_to_alpha</description>
      <product>
        <property>aero/qbar-psf</property>
        <property>metrics/Sw-sqft</property>
        <property>metrics/cbarw-ft</property>
        <property>aero/alpha-wing-rad</property>
        <value>-2.5</value>
      </product>
    </function>

    <function name="aero/coefficient/Cmflaps">
      <description>Pitch_moment_due_to_flaps</description>
      <product>
        <property>aero/qbar-psf</property>
        <property>metrics/Sw-sqft</property>
        <property>metrics/cbarw-ft</property>
        <table>
          <independentVar lookup="row">fcs/flap-pos-deg</independentVar>
          <tableData>
             0   0.000
            25  -0.090
            65  -0.140
          </tableData>
        </table>
      </product>
    </function>

    <function name="aero/coefficient/Cmde">
      <description>Pitch_moment_due_to_elevator</description>
      <product>
        <property>aero/qbar-psf</property>
        <property>metrics/Sw-sqft</property>
        <property>metrics/cbarw-ft</property>
        <property>fcs/elevator-pos-rad</property>
        <value>-1.3</value>
      </product>
    </function>

    <function name="aero/coefficient/Cmq">
      <description>Pitch_moment_due_to_pitch_rate</description>
      <product>
        <property>aero/qbar-psf</property>
        <property>metrics/Sw-sqft</property>
        <property>metrics/cbarw-ft</property>
        <property>aero/ci2vel</property>
        <property>velocities/q-aero-rad_sec</property>
        <value>-15</value>
      </product>
    </function>

    <function name="aero/coefficient/Cmadot">
      <description>Pitch_moment_due_to_alpha_rate</description>
      <product>
        <property>aero/qbar-psf</property>
        <property>metrics/Sw-sqft</property>
        <property>metrics/cbarw-ft</property>
        <property>aero/ci2vel</property>
        <property>aero/alphadot-rad_sec</property>
        <value>-8</value>
      </product>
    </function>

  </axis>

  <axis name="YAW">

    <function name="aero/coefficient/Cnb">
      <description>Yaw_moment_due_to_beta</description>
      <product>
        <property>aero/qbar-psf</property>
        <property>metrics/Sw-sqft</property>
        <property>metrics/bw-ft</property>
        <property>aero/beta-rad</property>
        <value>0.18</value>
      </product>
    </function>

    <function name="aero/coefficient/Cnr">
      <description>Yaw_moment_due_to_yaw_rate</description>
      <product>
        <property>aero/qbar-psf</property>
        <property>metrics/Sw-sqft</property>
        <property>metrics/bw-ft</property>
        <property>aero/bi2vel</property>
        <property>velocities/r-aero-rad_sec</property>
        <value>-0.12</value>
      </product>
    </function>

    <function name="aero/coefficient/Cndr">
      <description>Yaw_moment_due_to_rudder</description>
      <product>
        <property>aero/qbar-psf</property>
        <property>metrics/Sw-sqft</property>
        <property>metrics/bw-ft</property>
        <property>fcs/rudder-pos-rad</property>
        <value>-0.065</value>
      </product>
    </function>

    <function name="aero/coefficient/Cnda">
      <description>Adverse_yaw</description>
      <product>
        <property>aero/qbar-psf</property>
        <property>metrics/Sw-sqft</property>
        <property>metrics/bw-ft</property>
        <property>fcs/left-aileron-pos-rad</property>
        <property>aero/alpha-wing-rad</property>
        <value>-0.025</value>
      </product>
    </function>

  </axis>

  </aerodynamics>

</fdm_config>
