<?xml version="1.0"?>

<propeller name="prop">
  <ixx> 1.9 </ixx>
  <diameter unit="IN"> 78.7 </diameter>
  <numblades> 2 </numblades>
  <minpitch> 17 </minpitch>
  <maxpitch> 24 </maxpitch>
  <gearratio> 1.0 </gearratio>

  <table name="C_THRUST" type="internal">
    <tableData>
		9.6	11	15	19	23	27	31	35
        0.00    0.0650  0.0750  0.0820  0.0765  0.0882  0.1005  0.1070  0.1220
	0.10	0.0618	0.0700	0.0815	0.0798	0.0877	0.0990	0.1103	0.1253
	0.15	0.0571	0.0654	0.0802	0.0828	0.0871	0.0963	0.1055	0.1205
	0.20	0.0516	0.0603	0.0782	0.0841	0.0864	0.0940	0.1016	0.1166
	0.25	0.0455	0.0547	0.0761	0.0849	0.0855	0.0917	0.0979	0.1129
	0.30	0.0388	0.0488	0.0716	0.0838	0.0845	0.0896	0.0947	0.1097
	0.35	0.0321	0.0420	0.0666	0.0815	0.0831	0.0875	0.0919	0.1069
	0.40	0.0251	0.0350	0.0605	0.0775	0.0817	0.0855	0.0893	0.1043
	0.45	0.0181	0.0278	0.0545	0.0725	0.0802	0.0838	0.0874	0.1024
	0.50	0.0110	0.0206	0.0470	0.0677	0.0788	0.0819	0.0850	0.1000
	0.55	0.0049	0.0130	0.0382	0.0615	0.0770	0.0805	0.0840	0.0990
	0.60	-0.0012	0.0056	0.0297	0.0545	0.0739	0.0800	0.0861	0.1011
	0.65	-0.0073	0.0010	0.0218	0.0472	0.0696	0.0795	0.0894	0.1044
	0.70	-0.0134	-0.0050	0.0139	0.0398	0.0640	0.0779	0.0918	0.1068
	0.75	-0.0195	-0.0110	0.0070	0.0321	0.0573	0.0752	0.0931	0.1081
	0.80	-0.0256	-0.0170	0.0015	0.0251	0.0508	0.0711	0.0914	0.1064
	0.85	-0.0317	-0.0230	-0.0047	0.0175	0.0441	0.0660	0.0879	0.1029
	0.90	-0.0378	-0.0290	-0.0109	0.0110	0.0375	0.0602	0.0829	0.0979
	0.95	-0.0439	-0.0350	-0.0171	0.0027	0.0308	0.0544	0.0780	0.0930
	1.00	-0.0500	-0.0410	-0.0233	-0.0056	0.0240	0.0482	0.0724	0.0874
	1.05	-0.0561	-0.0470	-0.0295	-0.0124	0.0172	0.0420	0.0668	0.0818
	1.10	-0.0622	-0.0530	-0.0357	-0.0192	0.0106	0.0355	0.0604	0.0754
	1.15	-0.0683	-0.0590	-0.0419	-0.0260	0.0040	0.0290	0.0540	0.0690
	1.20	-0.0744	-0.0650	-0.0481	-0.0328	-0.0026	0.0222	0.0470	0.0620
	1.25	-0.0805	-0.0710	-0.0520	-0.0396	-0.0092	0.0155	0.0402	0.0560
	1.30	-0.0866	-0.0770	-0.0575	-0.0464	-0.0158	0.0085	0.0328	0.0500
	1.35	-0.0927	-0.0830	-0.0630	-0.0532	-0.0224	-0.0010	0.0254	0.0440
	1.40	-0.0988	-0.0890	-0.0685	-0.0600	-0.0290	-0.0105	0.0180	0.0380
	1.45	-0.1049	-0.0950	-0.0740	-0.0668	-0.0356	-0.0200	0.0106	0.0320
	1.50	-0.1110	-0.1010	-0.0795	-0.0736	-0.0422	-0.0295	0.0032	0.0260
	1.55	-0.1171	-0.1070	-0.0850	-0.0804	-0.0488	-0.0390	-0.0042	0.0200
	1.60	-0.1232	-0.1130	-0.0905	-0.0872	-0.0554	-0.0485	-0.0116	0.0140
	1.65	-0.1293	-0.1190	-0.0960	-0.0940	-0.0620	-0.0580	-0.0190	0.0080
	1.70	-0.1354	-0.1250	-0.1015	-0.1008	-0.0686	-0.0675	-0.0264	0.0020
	1.75	-0.1415	-0.1310	-0.1070	-0.1076	-0.0752	-0.0770	-0.0338	-0.0040
    </tableData>
  </table>

  <table name="C_POWER" type="internal">
    <tableData>
		9.6	11	15	19	23	27	31	35
	0.10	0.0217	0.0283	0.0394	0.0558	0.0822	0.1125	0.1475	0.1825
	0.15	0.0213	0.0277	0.0400	0.0554	0.0801	0.1094	0.1444	0.1794
	0.20	0.0205	0.0267	0.0401	0.0550	0.0785	0.1058	0.1408	0.1758
	0.25	0.0196	0.0253	0.0398	0.0543	0.0763	0.1023	0.1373	0.1723
	0.30	0.0183	0.0238	0.0393	0.0535	0.0741	0.0992	0.1342	0.1692
	0.35	0.0165	0.0220	0.0387	0.0525	0.0717	0.0962	0.1312	0.1662
	0.40	0.0141	0.0196	0.0371	0.0514	0.0698	0.0945	0.1295	0.1645
	0.45	0.0114	0.0169	0.0351	0.0500	0.0678	0.0918	0.1268	0.1618
	0.50	0.0082	0.0138	0.0319	0.0487	0.0668	0.0890	0.1240	0.1590
	0.55	0.0067	0.0100	0.0272	0.0464	0.0652	0.0865	0.1215	0.1565
	0.60	0.0052	0.0056	0.0225	0.0432	0.0637	0.0850	0.1200	0.1550
	0.65	0.0037	0.0043	0.0179	0.0393	0.0619	0.0837	0.1187	0.1537
	0.70	0.0022	0.0032	0.0128	0.0350	0.0590	0.0820	0.1170	0.1520
	0.75	0.0007	0.0021	0.0077	0.0298	0.0552	0.0797	0.1147	0.1497
	0.80	-0.0008	0.0010	0.0043	0.0249	0.0512	0.0766	0.1116	0.1466
	0.85	-0.0023	-0.0001	0.0009	0.0191	0.0465	0.0729	0.1079	0.1429
	0.90	-0.0038	-0.0012	-0.0025	0.0139	0.0414	0.0688	0.1038	0.1388
	0.95	-0.0053	-0.0023	-0.0059	0.0087	0.0357	0.0642	0.0992	0.1342
	1.00	-0.0068	-0.0034	-0.0093	0.0035	0.0299	0.0591	0.0941	0.1291
	1.05	-0.0083	-0.0045	-0.0127	0.0017	0.0244	0.0535	0.0885	0.1215
	1.10	-0.0098	-0.0056	-0.0161	-0.0001	0.0185	0.0473	0.0823	0.1120
	1.15	-0.0113	-0.0067	-0.0195	-0.0019	0.0155	0.0405	0.0755	0.1040
	1.20	-0.0128	-0.0078	-0.0229	-0.0037	0.0043	0.0333	0.0683	0.0960
	1.25	-0.0143	-0.0089	-0.0263	-0.0055	-0.0069	0.0254	0.0604	0.0880
	1.30	-0.0158	-0.0100	-0.0297	-0.0073	-0.0181	0.0177	0.0527	0.0800
	1.35	-0.0173	-0.0111	-0.0331	-0.0091	-0.0293	0.0043	0.0450	0.0720
	1.40	-0.0188	-0.0122	-0.0365	-0.0109	-0.0405	-0.0091	0.0373	0.0640
	1.45	-0.0203	-0.0133	-0.0399	-0.0127	-0.0517	-0.0225	0.0296	0.0560
	1.50	-0.0218	-0.0144	-0.0433	-0.0145	-0.0629	-0.0359	0.0219	0.0480
	1.55	-0.0233	-0.0155	-0.0467	-0.0163	-0.0741	-0.0493	0.0142	0.0400
	1.60	-0.0248	-0.0166	-0.0501	-0.0181	-0.0853	-0.0627	0.0065	0.0320
	1.65	-0.0263	-0.0177	-0.0535	-0.0199	-0.0965	-0.0761	-0.0012	0.0240
	1.70	-0.0278	-0.0188	-0.0569	-0.0217	-0.1077	-0.0895	-0.0089	0.0160
	1.75	-0.0293	-0.0199	-0.0603	-0.0235	-0.1189	-0.1029	-0.0166	0.0080
    </tableData>
  </table>
<!--
  <table name="C_THRUST" type="internal">
     <tableData>
      0.0   0.068
      0.1   0.068
      0.2   0.067
      0.3   0.066
      0.4   0.064
      0.5   0.061
      0.6   0.057
      0.7   0.050
      0.8   0.040
      0.9   0.029
      1.0   0.019
      1.1   0.008
      1.2   -0.001
      1.3   -0.008
      1.4   -0.019
      1.5   -0.029
      1.6   -0.040
      1.7   -0.050
      1.8   -0.057
      1.9   -0.061
      2.0   -0.064
      2.1   -0.066
      2.2   -0.067
      2.3   -0.068
      5.0   -0.068
     </tableData>
  </table>


  <table name="C_POWER" type="internal">
     <tableData>
      0.0   0.0580
      0.1   0.0620
      0.2   0.0600
      0.3   0.0580
      0.4   0.0520
      0.5   0.0450
      0.6   0.0421
      0.7   0.0389
      0.8   0.0346
      0.9   0.0280
      1.0   0.0202
      1.1   0.0111
      1.2   0.0075
      1.3   0.0111
      1.4   0.0202
      1.5   0.0280
      1.6   0.0346
      1.7   0.0389
      1.8   0.0421
      1.9   0.0436
      2.0   0.0445
      2.1   0.0445
      2.2   0.0442
      2.3   0.0431
      2.4   0.0424
      5.0   0.0413
     </tableData>
  </table>
-->
</propeller>
